*HEADING
test strain efinitions
**
*NODE, SYSTEM=R, NSET=NALL
       1,            0.,            0.
       2,           0.5,            0.
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**
**
*ELEMENT, TYPE=C3D20R, ELSET=eall
       1,       1,       3,      20,      18,      64,      66,      83,
      81,       2,      13,      19,      12,      65,      76,      82,
      75,      46,      47,      53,      52
       2,       3,       5,      22,      20,      66,      68,      85,
      83,       4,      14,      21,      13,      67,      77,      84,
      76,      47,      48,      54,      53
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*NSET, NSET=FIXED
       1,      12,      18,      29,      35,      46
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*NSET, NSET=UP
      11,      17,      28,      34,      45,      51
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*NSET, NSET=outele
*SOLID SECTION,ELSET=eall,MATERIAL=steel
*MATERIAL,NAME=steel
*elastic
100.0,   .30
**
**
*STEP, AMPLITUDE=RAMP, INC=10000,NLGEOM
*STATIC,direct
0.01, 1.
*RESTART,WRITE,FREQ=500
**
*BOUNDARY, OP=NEW
FIXED, 1,,          0.
FIXED, 2,,          0.
FIXED, 3,,          0.
*CLOAD, OP=NEW
UP, 2,    0.047619
UP, 3,    0.047619
**
*NODE PRINT, FREQ=20
U,
**
*EL PRINT, POS=INTEG, FREQ=20
S,
E,
**
*END STEP
